** ==================
** MATERIALS
** ==================
**
*Material, name=ELISO-1
*Depvar
     5
*User Material, constants=3
**
70000,0.4,0
**
*Orientation, name=Ori-1
0.707107, 0.707107, 0, -0.707107, 0.707107, 0
1, 0.
*Solid Section, ElSet=Phase1, orientation=Ori-1, Material=ELISO-1
